q1 := [1/(1 + 1/3 + 1/5 + 1/3), 1/(3 + 1 + 1/3 + 3), 1/(5 + 3 + 1 + 3), 1/(3 + 1/3 + 1/3 + 1)]  # 1 - система формирования комплектов
A1 := [1, 1/3, 1/5, 1/3; 3, 1, 1/3, 3; 5, 3, 1, 3; 3, 1/3, 1/3, 1]
A2 := [1, 1/3, 1/5, 1/3; 3, 1, 1/3, 3; 5, 3, 1, 3; 3, 1/3, 1/3, 1]
A3 := [1, 1/5, 1/9, 1/7; 5, 1, 1/3, 5; 9, 3, 1, 5; 7, 1/5, 1/5, 1]
# 2 - система формирования групп партий и комплектов
q2 := [1/(1 + 1/3 + 1/5 + 1/3), 1/(3 + 1 + 1/3 + 3), 1/(5 + 3 + 1 + 3), 1/(3 + 1/3 + 1/3 + 1)]  # 3 - директивные сроки выпуска комплекта
# 4 - динамическое расписание
q3 := [1/(1 + 1/5 + 1/9 + 1/7), 1/(5 + 1 + 1/3 + 5), 1/(9 + 3 + 1 + 5), 1/(7 + 1/5 + 1/5 + 1)]
A4 := [1, 1/3, 1/5, 1/3; 3, 1, 1/3, 3; 5, 3, 1, 3; 3, 1/3, 1/3, 1]
A5 := [1, 1/5, 1/9, 1/7; 5, 1, 1/3, 5; 9, 3, 1, 5; 7, 1/5, 1/5, 1]
A6 := [1, 1/7, 1/9, 3; 7, 1, 1/3, 3; 9, 3, 1, 5; 1/3, 1/3, 1/5, 1]
q4 := [1/(1 + 1/3 + 1/5 + 1/3), 1/(3 + 1 + 1/3 + 3), 1/(5 + 3 + 1 + 3), 1/(3 + 1/3 + 1/3 + 1)]
q5 := [1/(1 + 1/5 + 1/9 + 1/7), 1/(5 + 1 + 1/3 + 5), 1/(9 + 3 + 1 + 5), 1/(7 + 1/5 + 1/5 + 1)]
q1 = [0.535714, 0.136364, 0.0833333, 0.214286]
q2 = [0.535714, 0.136364, 0.0833333, 0.214286]
q6 := [1/(1 + 1/7 + 1/9 + 3), 1/(7 + 1 + 1/3 + 3), 1/(9 + 3 + 1 + 5), 1/(1/3 + 1/3 + 1/5 + 1)]
q3 = [0.687773, 0.0882353, 0.0555556, 0.119048]
q4 = [0.535714, 0.136364, 0.0833333, 0.214286]
q5 = [0.687773, 0.0882353, 0.0555556, 0.119048]
A := [
    1, 1/3, 1/5, 1/3, 1/9, 1/7;
    3, 1, 1/3, 1/5, 1/9, 1/7;
    5, 3, 1, 1/3, 1/5, 1/3;
    3, 5, 3, 1, 1/5, 1/3;
    9, 9, 5, 5, 1, 3;
    7, 7, 3, 3, 1/3, 1
]
q6 = [0.235075, 0.0882353, 0.0555556, 0.535714]
w := [1/(1 + 1/3 + 1/5 + 1/3 + 1/9 + 1/7), 1/(3 + 1 + 1/3 + 1/5 + 1/9 + 1/7), 1/(5 + 3 + 1 + 1/3 + 1/5 + 1/3), 1/(3 + 5 + 3 + 1 + 1/5 + 1/3), 1/(9 + 9 + 5 + 5 + 1 + 3), 1/(7 + 7 + 3 + 3 + 1/3 + 1)]
D := [0.235, 0.088, 0.056, 0.119]
w = [0.471557, 0.208886, 0.101351, 0.0797872, 0.03125, 0.046875]
0.472 + 0.209 + 0.101 + 0.08 + 0.031 + 0.047 = 0.94
