l[0, 1] := 2
l[1, 2] := 2
l[2, 3] := 2
l[3, 4] := 1
l[3, 5] := 1
l[4, 3] := 1
p := [1; 0; 0; 0; 0; 0; 0; 0; 0]
l[5, 6] := 1
l[5, 7] := 2
l[6, 8] := 1
l[7, 8] := 1
l[8, 0] := 0.5
D(t, p) := [
    l[8, 0]*p[8] - l[0, 1]*p[0];
    l[0, 1]*p[0] - l[1, 2]*p[1];
    l[1, 2]*p[1] - l[2, 3]*p[2];
    l[4, 3]*p[4] + l[2, 3]*p[2] - l[3, 4]*p[3] - l[3, 5]*p[3];
    l[3, 4]*p[3] - l[4, 3]*p[4];
    l[3, 5]*p[3] - l[5, 6]*p[5] - l[5, 7]*p[5];
    l[5, 6]*p[5] - l[6, 8]*p[6];
    l[5, 6]*p[5] - l[7, 8]*p[7];
    l[6, 8]*p[6] + l[7, 8]*p[7] - l[8, 0]*p[8]
]
l = [
    0, 2, 0, 0, 0, 0, 0, 0, 0;
    0, 0, 2, 0, 0, 0, 0, 0, 0;
    0, 0, 0, 2, 0, 0, 0, 0, 0;
    0, 0, 0, 0, 1, 1, 0, 0, 0;
    0, 0, 0, 1, 0, 0, 0, 0, 0;
    0, 0, 0, 0, 0, 0, 1, 2, 0;
    0, 0, 0, 0, 0, 0, 0, 0, 1;
    0, 0, 0, 0, 0, 0, 0, 0, 1;
    0.5, 0, 0, 0, 0, 0, 0, 0, 0
]
AA := [
    -l[0, 1], 0, 0, 0, 0, 0, 0, 0, l[8, 0];
    l[0, 1], -l[1, 2], 0, 0, 0, 0, 0, 0, 0;
    0, l[1, 2], -l[2, 3], 0, 0, 0, 0, 0, 0;
    0, 0, l[2, 3], -l[3, 4] - l[3, 5], l[4, 3], 0, 0, 0, 0;
    0, 0, 0, l[3, 4], -l[4, 3], 0, 0, 0, 0;
    0, 0, 0, l[3, 5], 0, -l[5, 6] - l[5, 7], 0, 0, 0;
    0, 0, 0, 0, 0, l[5, 6], -l[6, 8], 0, 0;
    0, 0, 0, 0, 0, l[5, 6], 0, -l[7, 8], 0;
    0, 0, 0, 0, 0, 0, l[6, 8], l[7, 8], -l[8, 0]
]
eigenvals(AA) = [-3.24734 + 0.470148i; -3.24734 - 0.470148i; -2.19517 + 1.06038i; -2.19517 - 1.06038i; -0.779323 + 0.708876i; -0.779323 - 0.708876i; -0.0563264; -1; -1]
AA = [
    -2, 0, 0, 0, 0, 0, 0, 0, 0.5;
    2, -2, 0, 0, 0, 0, 0, 0, 0;
    0, 2, -2, 0, 0, 0, 0, 0, 0;
    0, 0, 2, -2, 1, 0, 0, 0, 0;
    0, 0, 0, 1, -1, 0, 0, 0, 0;
    0, 0, 0, 1, 0, -3, 0, 0, 0;
    0, 0, 0, 0, 0, 1, -1, 0, 0;
    0, 0, 0, 0, 0, 1, 0, -1, 0;
    0, 0, 0, 0, 0, 0, 1, 1, -0.5
]
BB := [1; 0; 0; 0; 0; 0; 0; 0; 0]
lsolve(AA, BB) = [-1.5; -1.5; -1.5; -3; -3; -1; -1; -1; -4]
t := 5
n := 1 .. 15
Z := rkfixed(p, 0, t, 15, D)
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Z = [
    0, 1, 0, 0, 0, 0, 0, 0, 0, 0;
    0.333333, 0.514403, 0.337449, 0.123457, 0.0164609, 0.00411523, 0.00411523, 0, 0, 0;
    0.666667, 0.264631, 0.347174, 0.240885, 0.102989, 0.0204512, 0.0155697, 0.00244077, 0.00244077, 0.000644592;
    1, 0.136389, 0.267941, 0.273744, 0.19113, 0.0575673, 0.0386656, 0.00945085, 0.00945085, 0.00402275;
    1.33333, 0.0711755, 0.184099, 0.248112, 0.246289, 0.104517, 0.0619227, 0.0212971, 0.0212971, 0.0127753;
    1.66667, 0.0391478, 0.119374, 0.198657, 0.265811, 0.148348, 0.077629, 0.0353596, 0.0353596, 0.028305;
    2, 0.0249869, 0.0759266, 0.147538, 0.259951, 0.181231, 0.084196, 0.0485172, 0.0485172, 0.0499313;
    2.33333, 0.0206179, 0.0496528, 0.104983, 0.240331, 0.200832, 0.0835016, 0.058665, 0.058665, 0.0754387;
    2.66667, 0.0215721, 0.0356257, 0.0738516, 0.2157, 0.208398, 0.0783714, 0.0650134, 0.0650134, 0.102076;
    3, 0.0252284, 0.0297046, 0.0533859, 0.191391, 0.206791, 0.0712643, 0.0677632, 0.0677632, 0.127362;
    3.33333, 0.0299814, 0.0287913, 0.0414604, 0.170088, 0.199154, 0.0638663, 0.067644, 0.067644, 0.149507;
    3.66667, 0.0348412, 0.0306945, 0.0357295, 0.152763, 0.188228, 0.0571374, 0.0655452, 0.0655452, 0.167511;
    4, 0.0392253, 0.0339245, 0.0341213, 0.139413, 0.176088, 0.0515046, 0.0622917, 0.0622917, 0.18106;
    4.33333, 0.0428324, 0.0375136, 0.0349952, 0.129555, 0.164141, 0.0470585, 0.0585415, 0.0585415, 0.190345;
    4.66667, 0.0455538, 0.0408734, 0.037146, 0.122526, 0.153226, 0.0437049, 0.0547607, 0.0547607, 0.195873;
    5, 0.0474072, 0.0436853, 0.0397456, 0.117646, 0.14375, 0.0412651, 0.0512423, 0.0512423, 0.198302
]
a2 := [
    1, 1, 1, 1, 1, 1, 1, 1, 1;
    l[0, 1], -l[1, 2], 0, 0, 0, 0, 0, 0, 0;
    0, l[1, 2], -l[2, 3], 0, 0, 0, 0, 0, 0;
    0, 0, l[2, 3], -l[3, 4] - l[3, 5], l[4, 3], 0, 0, 0, 0;
    0, 0, 0, l[3, 4], -l[4, 3], 0, 0, 0, 0;
    0, 0, 0, l[3, 5], 0, -l[5, 6] - l[5, 7], 0, 0, 0;
    0, 0, 0, 0, 0, l[5, 6], -l[6, 8], 0, 0;
    0, 0, 0, 0, 0, l[5, 6], 0, -l[7, 8], 0;
    0, 0, 0, 0, 0, 0, l[6, 8], l[7, 8], -l[8, 0]
]
eigenvals(a2) = [1.98954; -3.16463 + 0.501337i; -3.16463 - 0.501337i; -1.85279 + 0.89369i; -1.85279 - 0.89369i; -0.727349 + 0.529976i; -0.727349 - 0.529976i; -1; -1]
lsolve(a2, BB) = [0.0857143; 0.0857143; 0.0857143; 0.171429; 0.171429; 0.0571429; 0.0571429; 0.0571429; 0.228571]
