# Саша | Дима | Руссо
# |
# |
# |
# |
# |
# |
# |
# |
# |
# |
# |
# |
# |
# |
# |
# |
# |
# |
# |
# |
# |
# |
# |
# |
# |
# |
# |
# |
# |
# |
# |
# |
# |
# |
# |
# |
# |
# |
# |
# |
# |
# |
# |
# |
# |
# |
# |
# |
# |
# |
# |
# |
# |
# |
# |
# |
# |
# |
# |
# |
# |
# |
# |
# |
# |
# |
# 1 ММПЭ
f1 := [1, 3; 1, 3; 1, 2; 1, 2]
f2 := [1, 1, 1, 1; 3, 3, 2, 2]
W := [1, 0, 0, 0; 0, 1, 0, 0; 0, 0, 6, 0; 0, 0, 0, 6]
F := [1, 3; 1, 3; 1, 5; 1, 5]
Ft := [1, 1, 1, 1; 3, 3, 5, 5]
WS := [1, 0, 0, 0; 0, 1, 0, 0; 0, 0, 4, 0; 0, 0, 0, 4]
yS := [3; 4; 3; 5]
(Ft*WS*F)^-1*Ft*WS*yS = [2.75; 0.25]
y := [4; 4; 3; 5]
(f2*W*f1)^-1*f2*W*y = [4; 0]
# 5 ЛИМН
F := [1, 2; 1, 3; 1, 6; 1, 5]
Ft := transpose(F) = [1, 1, 1, 1; 2, 3, 6, 5]
Y := [3; 3; 5; 6]
fR := [1, 3; 1, 3; 1, 6; 1, 2; 1, 2; 1, 2]
ftR := transpose(fR) = [1, 1, 1, 1, 1, 1; 3, 3, 6, 2, 2, 2]
yR := [3; 5; 7; 6; 8; 6]
f := [1, 1; 1, 3; 1, 1; 1, 2; 1, 5; 1, 3; 1, 2]
ft := transpose(f) = [1, 1, 1, 1, 1, 1, 1; 1, 3, 1, 2, 5, 3, 2]
y := [4; 3; 5; 4; 5; 1; 6]
(Ft*F)^-1*Ft*Y = [1.45; 0.7]
(ftR*fR)^-1*ftR*yR = [5.58333; 0.0833333]
(ft*f)^-1*ft*y = [4.41463; -0.170732]
